<?xml version="1.0"?>
<!-- Generated by Aero-Matic v 1.1

     Inputs:
                horsepower: 2550.0
                     pitch: variable
            max engine rpm: 15100
        prop diameter (ft): 9.843

     Outputs:
              max prop rpm: 1906.23
                gear ratio:    7.92
                       Cp0: 0.199060
                       Ct0: 0.463809
       static thrust (lbs): 10449.79
-->

<propeller name="an24_prop">
  <ixx>  7.355 </ixx>
  <diameter unit="M">   3.9 </diameter>
  <numblades> 4 </numblades>
  <gearratio> 12.11341 </gearratio>
  <constspeed> 1 </constspeed>
  <p_factor>   9.33 </p_factor>
  <minpitch> 19 </minpitch> <!-- was 8 -->
  <maxpitch> 92.5 </maxpitch>
  <reversepitch> 8 </reversepitch>
  <minrpm>   1240 </minrpm>
  <maxrpm>   1250 </maxrpm>
  <ct_factor> 1.236 </ct_factor>

 <!-- thrust coefficient as a function of advance ratio and blade angle -->
  <table name="C_THRUST" type="internal">
      <tableData>
	13	16	19	22	25	28	31	34	37	40	43	46	49
-0.0099	0.1312	0.1464	0.1564	0.1633	0.1658	0.1699	0.173	0.175	0.1766	0.1776	0.1756	0.1698	0.1579
-0.0037	0.1307	0.146	0.1562	0.1632	0.1657	0.1698	0.173	0.175	0.1766	0.1776	0.1755	0.1699	0.158
0.0957	0.1223	0.1396	0.1527	0.1615	0.1651	0.1693	0.1729	0.175	0.1762	0.1773	0.1753	0.1706	0.1589
0.1936	0.1109	0.1302	0.147	0.1584	0.1633	0.1682	0.1718	0.1739	0.1759	0.177	0.175	0.1712	0.1598
0.2391	0.1033	0.1249	0.1429	0.156	0.1624	0.1671	0.1711	0.1732	0.1751	0.1761	0.1749	0.171	0.16
0.3538	0.082	0.1087	0.1316	0.148	0.1581	0.1644	0.1683	0.1708	0.173	0.1736	0.1726	0.1701	0.1602
0.3953	0.0736	0.1017	0.1272	0.1445	0.156	0.1634	0.167	0.1698	0.1719	0.1725	0.1717	0.1699	0.1603
0.499	0.0525	0.0806	0.1109	0.1334	0.1503	0.1587	0.1633	0.1665	0.1685	0.1695	0.1689	0.1685	0.1599
0.5963	0.0274	0.0607	0.0917	0.1197	0.1413	0.1526	0.1589	0.1631	0.1653	0.166	0.1659	0.166	0.1596
0.6923	0	0.0388	0.0727	0.1023	0.1291	0.1449	0.1533	0.1583	0.1622	0.1624	0.1647	0.1627	0.1595
0.7893	-0.0278	0.0112	0.0504	0.0809	0.1124	0.1342	0.1467	0.1534	0.1591	0.1589	0.1613	0.159	0.1569
0.8238	-0.0377	0.0013	0.0416	0.0733	0.1053	0.1297	0.1434	0.1513	0.1576	0.1576	0.1597	0.1578	0.1558
0.8997	-0.0594	-0.0206	0.0221	0.0562	0.0896	0.1193	0.1361	0.1463	0.1543	0.1548	0.1559	0.1554	0.1526
0.9996	-0.088	-0.0494	-0.0113	0.0305	0.067	0.1005	0.1249	0.1387	0.1489	0.152	0.1509	0.1522	0.1522
1.1169	-0.1216	-0.0832	-0.0504	0.0002	0.0388	0.0734	0.1052	0.1266	0.1399	0.1491	0.1476	0.1484	0.148
1.2637	-0.1636	-0.1255	-0.0993	-0.0377	0.0001	0.0374	0.0745	0.105	0.1259	0.1409	0.144	0.1442	0.144
1.4023	-0.2033	-0.1655	-0.1456	-0.0734	-0.0364	0.0013	0.0426	0.0778	0.1084	0.1306	0.1403	0.1409	0.1405
1.5868	-0.2561	-0.2186	-0.2071	-0.121	-0.0851	-0.0468	-0.0066	0.0376	0.0761	0.1084	0.1297	0.1377	0.1358
1.6966	-0.2875	-0.2503	-0.2437	-0.1494	-0.114	-0.0754	-0.0359	0.0097	0.0537	0.0922	0.1204	0.1362	0.1356
1.8943	-0.3441	-0.3073	-0.3096	-0.2003	-0.1661	-0.1269	-0.0886	-0.0406	0.0092	0.0572	0.0955	0.1241	0.1358
2.1393	-0.4143	-0.3779	-0.3914	-0.2636	-0.2307	-0.1908	-0.154	-0.1029	-0.0459	0	0.0523	0.0948	0.1216
2.4855	-0.5134	-0.4776	-0.5068	-0.3529	-0.322	-0.281	-0.2464	-0.1909	-0.1237	-0.0809	-0.0382	0.0276	0.0766
2.8839	-0.6274	-0.5925	-0.6397	-0.4557	-0.427	-0.3848	-0.3527	-0.2922	-0.2133	-0.174	-0.1465	-0.0773	-0.0001
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      </tableData>
  </table>

 <!-- power coefficient as a function of advance ratio and blade angle -->
  <table name="C_POWER" type="internal">
     <tableData>
	13	16	19	22	25	28	31	34	37	40	43	46	49
-0.002	0.0493	0.0723	0.0999	0.1272	0.1622	0.1995	0.2367	0.2771	0.3134	0.3498	0.3863	0.4175	0.4562
0.0681	0.051	0.0716	0.0956	0.1235	0.158	0.1948	0.2334	0.273	0.3116	0.3483	0.3858	0.4188	0.458
0.1297	0.052	0.0709	0.0947	0.1214	0.1548	0.1912	0.2304	0.2694	0.31	0.3471	0.3854	0.4194	0.4592
0.2026	0.0517	0.0703	0.0922	0.1188	0.1511	0.1872	0.2265	0.2652	0.3082	0.3455	0.3843	0.4192	0.4595
0.2916	0.0501	0.0699	0.0917	0.1162	0.1469	0.1828	0.2215	0.26	0.3028	0.342	0.3825	0.419	0.4593
0.3793	0.0453	0.0671	0.0905	0.1155	0.1445	0.1785	0.2162	0.2545	0.2974	0.3385	0.3796	0.4172	0.4577
0.4706	0.0378	0.0614	0.0866	0.1124	0.1409	0.174	0.2106	0.2481	0.2916	0.3345	0.3764	0.4152	0.4561
0.5501	0.0295	0.054	0.082	0.1081	0.137	0.1698	0.2049	0.2411	0.2858	0.331	0.3729	0.413	0.455
0.639	0.018	0.0438	0.0718	0.1012	0.1309	0.1633	0.198	0.2338	0.2785	0.3258	0.369	0.4103	0.4522
0.7534	-0.0001	0.0261	0.0558	0.0877	0.1206	0.1536	0.1889	0.2246	0.2685	0.3177	0.3621	0.4047	0.448
0.8949	-0.0224	-0.0001	0.0287	0.0665	0.1024	0.1385	0.1762	0.2125	0.2558	0.3055	0.3529	0.3977	0.4421
0.9973	-0.0386	-0.019	0.0052	0.0439	0.0839	0.1234	0.1644	0.2025	0.2466	0.2963	0.3448	0.3919	0.4364
1.1282	-0.0592	-0.0432	-0.0247	0.0069	0.0537	0.0992	0.1459	0.1878	0.2336	0.2846	0.3345	0.3831	0.429
1.1958	-0.0699	-0.0557	-0.0402	-0.0122	0.035	0.0825	0.1351	0.1796	0.2257	0.2777	0.3286	0.3781	0.4251
1.3482	-0.0939	-0.0839	-0.0751	-0.0552	-0.0153	0.0379	0.0981	0.1511	0.206	0.2609	0.3149	0.3663	0.4156
1.4718	-0.1135	-0.1068	-0.1034	-0.0901	-0.0562	-0.0051	0.0592	0.1197	0.1814	0.2444	0.3049	0.3582	0.4073
1.5972	-0.1333	-0.1299	-0.1321	-0.1255	-0.0976	-0.0488	0.0121	0.0807	0.1499	0.2209	0.2921	0.3522	0.4029
1.7028	-0.1499	-0.1495	-0.1563	-0.1553	-0.1324	-0.0855	-0.0277	0.0406	0.1171	0.1967	0.2748	0.3451	0.4006
1.8458	-0.1725	-0.1759	-0.1891	-0.1956	-0.1797	-0.1352	-0.0817	-0.0147	0.0661	0.1555	0.2453	0.3295	0.3934
2.0284	-0.2013	-0.2097	-0.2309	-0.2472	-0.24	-0.1988	-0.1506	-0.0855	-0.003	0.0938	0.1951	0.2957	0.375
2.3162	-0.2467	-0.2629	-0.2968	-0.3284	-0.335	-0.2989	-0.2593	-0.1969	-0.1119	-0.0272	0.0879	0.2148	0.3236
2.7452	-0.3144	-0.3422	-0.395	-0.4495	-0.4766	-0.4481	-0.4212	-0.363	-0.2742	-0.2103	-0.1219	0.0161	0.1817
3.0965	-0.3699	-0.4072	-0.4755	-0.5487	-0.5927	-0.5703	-0.5539	-0.4991	-0.4071	-0.3602	-0.2961	-0.1691	-0.0003
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     </tableData>
  </table>

<!-- thrust effects of helical tip Mach -->
<table name="CT_MACH" type="internal">
  <tableData>
    0.85   1.0
    1.05   0.8
  </tableData>
</table>

<!-- power-required effects of helical tip Mach -->
<table name="CP_MACH" type="internal">
  <tableData>
    0.85   1.0
    1.05   1.8
    2.00   1.4
  </tableData>
</table>

</propeller>
