<?xml version="1.0"?>
<?xml-stylesheet type="text/xsl" href="http://jsbsim.sourceforge.net/JSBSim.xsl"?>
<fdm_config name="an24" version="2.0" release="ALPHA"
   xmlns:xsi="http://www.w3.org/2001/XMLSchema-instance"
   xsi:noNamespaceSchemaLocation="http://jsbsim.sourceforge.net/JSBSim.xsd">

 <fileheader>
  <author> Aeromatic v 0.95 </author>
  <filecreationdate>2013-08-31</filecreationdate>
  <version>$Revision: 1.15 $</version>
  <description> Models a an24. </description>
 </fileheader>

<!--
  File:     an24.xml
  Inputs:
    name:          an24
    type:          multi-engine prop transport
    max weight:    48069 lb
    wing span:     95.8052 ft
    length:        77.20193 ft
    wing area:     780.02907406 sq-ft
    gear type:     tricycle
    retractable?:  yes
    # engines:     2
    engine type:   turboprop
    engine layout: wings
    yaw damper?    no

  Outputs:
    wing loading:  61.62 lb/sq-ft
    payload:       6422.7 lbs
    CL-alpha:      4.9 per radian
    CL-0:          0.24
    CL-max:        1.4
    CD-0:          0.025
    K:             0.039

-->

 <metrics>
   <wingarea  unit="M2" >   74.98 </wingarea>
   <wingspan  unit="M"  >   29.20 </wingspan>
   <wing_incidence unit="DEG">          3.00 </wing_incidence>
   <chord     unit="M" >    2.813 </chord>
   <htailarea unit="M2">    17.23 </htailarea>
   <htailarm  unit="M" >    12.249 </htailarm> <!-- Just a guess from blueprint -->
   <vtailarea unit="M2">    13.28 </vtailarea>
   <vtailarm  unit="M" >    11.297 </vtailarm> <!-- Just a guess from blueprint -->
   <location name="AERORP" unit="IN">
     <x> 444.12 </x>
     <y>   0.00 </y>
     <z>   0.00 </z>
   </location>
   <location name="EYEPOINT" unit="IN">
     <x>  74.11 </x>
     <y> -24.00 </y>
     <z>  65.00 </z>
   </location>
   <location name="VRP" unit="IN">
     <x>0</x>
     <y>0</y>
     <z>0</z>
   </location>
 </metrics>

 <mass_balance>
   <ixx unit="SLUG*FT2">    214809 </ixx>
   <iyy unit="SLUG*FT2">    166865 </iyy>
   <izz unit="SLUG*FT2">    377779 </izz>
   <emptywt unit="KG"  >     13750 </emptywt>
   <location name="CG" unit="M"> <!-- real coordinates taken from the book "An-24 TO book 1" -->
     <x>   9.446</x>
     <y>   0.00 </y>
     <z>   0.73 </z>
   </location>
   <!-- All data in this section is taken from the book "An-24 TO book 1" -->
   <pointmass name="2 pilots">
    <weight unit="KG">   160.0 </weight>
    <location name="POINTMASS" unit="M">
      <x>   2.74 </x>
      <y>   0.00 </y>
      <z>   0.38 </z>
    </location>
  </pointmass>
  <pointmass name="Cabin crew">
    <weight unit="KG">    80.0 </weight>
    <location name="POINTMASS" unit="M">
      <x>  16.20 </x>
      <y>   0.00 </y>
      <z>   0.10 </z>
    </location>
  </pointmass>
  <pointmass name="Engine oil">
    <weight unit="KG">    95.0 </weight>
    <location name="POINTMASS" unit="M">
      <x>   6.91 </x>
      <y>   0.00 </y>
      <z>   0.57 </z>
    </location>
  </pointmass>
  <pointmass name="Toilet water">
    <weight unit="KG">    26.0 </weight>
    <location name="POINTMASS" unit="M">
      <x>  15.90 </x>
      <y>   0.00 </y>
      <z>   1.20 </z>
    </location>
  </pointmass>
  <pointmass name="Oxygen cistern in cabin">
    <weight unit="KG">    3.0 </weight>
    <location name="POINTMASS" unit="M">
      <x>  17.20 </x>
      <y>   0.00 </y>
      <z>   0.65 </z>
    </location>
  </pointmass>
  <pointmass name="Oxygen cistern in cockpit">
    <weight unit="KG">    3.0 </weight>
    <location name="POINTMASS" unit="M">
      <x>   3.28 </x>
      <y>   0.00 </y>
      <z>   0.40 </z>
    </location>
  </pointmass>
  <pointmass name="Toilet chemicals">
    <weight unit="KG">    6.0 </weight>
    <location name="POINTMASS" unit="M">
      <x>  16.60 </x>
      <y>   0.00 </y>
      <z>  -0.45 </z>
    </location>
  </pointmass>
  <pointmass name="Buffet">
    <weight unit="KG">    40.0 </weight>
    <location name="POINTMASS" unit="M">
      <x>  16.10 </x>
      <y>   0.00 </y>
      <z>  -0.35 </z>
    </location>
  </pointmass>
  <pointmass name="Passangers row 1">
    <weight unit="KG">   300.0 </weight>
    <location name="POINTMASS" unit="M">
      <x>   6.61 </x>
      <y>   0.00 </y>
      <z>  -0.06 </z>
    </location>
  </pointmass>
  <pointmass name="Passangers row 2">
    <weight unit="KG">   300.0 </weight>
    <location name="POINTMASS" unit="M">
      <x>   7.33 </x>
      <y>   0.00 </y>
      <z>  -0.06 </z>
    </location>
  </pointmass>
  <pointmass name="Passangers row 3">
    <weight unit="KG">   300.0 </weight>
    <location name="POINTMASS" unit="M">
      <x>   8.05 </x>
      <y>   0.00 </y>
      <z>  -0.06 </z>
    </location>
  </pointmass>
  <pointmass name="Passangers row 4">
    <weight unit="KG">   300.0 </weight>
    <location name="POINTMASS" unit="M">
      <x>   8.77 </x>
      <y>   0.00 </y>
      <z>  -0.06 </z>
    </location>
  </pointmass>
  <pointmass name="Passangers row 5">
    <weight unit="KG">   300.0 </weight>
    <location name="POINTMASS" unit="M">
      <x>   9.49 </x>
      <y>   0.00 </y>
      <z>  -0.06 </z>
    </location>
  </pointmass>
  <pointmass name="Passangers row 6">
    <weight unit="KG">   300.0 </weight>
    <location name="POINTMASS" unit="M">
      <x>  10.21 </x>
      <y>   0.00 </y>
      <z>  -0.06 </z>
    </location>
  </pointmass>
  <pointmass name="Passangers row 7">
    <weight unit="KG">   300.0 </weight>
    <location name="POINTMASS" unit="M">
      <x>  10.93 </x>
      <y>   0.00 </y>
      <z>  -0.06 </z>
    </location>
  </pointmass>
  <pointmass name="Passangers row 8">
    <weight unit="KG">   300.0 </weight>
    <location name="POINTMASS" unit="M">
      <x>  11.65 </x>
      <y>   0.00 </y>
      <z>  -0.06 </z>
    </location>
  </pointmass>
  <pointmass name="Passangers row 9">
    <weight unit="KG">   300.0 </weight>
    <location name="POINTMASS" unit="M">
      <x>  12.37 </x>
      <y>   0.00 </y>
      <z>  -0.06 </z>
    </location>
  </pointmass>
  <pointmass name="Passangers row 10">
    <weight unit="KG">   300.0 </weight>
    <location name="POINTMASS" unit="M">
      <x>  13.09 </x>
      <y>   0.00 </y>
      <z>  -0.06 </z>
    </location>
  </pointmass>
  <pointmass name="Passangers row 11">
    <weight unit="KG">   300.0 </weight>
    <location name="POINTMASS" unit="M">
      <x>  13.81 </x>
      <y>   0.00 </y>
      <z>  -0.06 </z>
    </location>
  </pointmass>
  <pointmass name="Passangers row 12">
    <weight unit="KG">   300.0 </weight>
    <location name="POINTMASS" unit="M">
      <x>  14.53 </x>
      <y>   0.00 </y>
      <z>  -0.06 </z>
    </location>
  </pointmass>
  <pointmass name="Passangers row 13">
    <weight unit="KG">   150.0 </weight>
    <location name="POINTMASS" unit="M">
      <x>  15.25 </x>
      <y>   0.00 </y>
      <z>  -0.06 </z>
    </location>
  </pointmass>

  <pointmass name="Baggage room 1 left">
    <weight unit="KG">   200.0 </weight> <!-- Maximum load 900 kg -->
    <location name="POINTMASS" unit="M">
      <x>   5.02 </x>
      <y>  -0.70 </y>
      <z>   0.30 </z>
    </location>
  </pointmass>
  <pointmass name="Baggage room 1 right">
    <weight unit="KG">   200.0 </weight> <!-- Maximum load 600 kg -->
    <location name="POINTMASS" unit="M">
      <x>   5.34 </x>
      <y>   0.70 </y>
      <z>   0.30 </z>
    </location>
  </pointmass>
  <pointmass name="Baggage room 2">
    <weight unit="KG">   50.0 </weight> <!-- Maximum load 600 kg -->
    <location name="POINTMASS" unit="M">
      <x>  18.00 </x>
      <y>   0.00 </y>
      <z>   0.40 </z>
    </location>
  </pointmass>
  <pointmass name="Baggage room 3">
    <weight unit="KG">   50.0 </weight> <!-- Maximum load 570 kg -->
    <location name="POINTMASS" unit="M">
      <x>  19.28 </x>
      <y>   0.00 </y>
      <z>   0.60 </z>
    </location>
  </pointmass>
  <!-- For engines with water injection
  <pointmass name="Water for engines">
    <weight unit="KG">    68.0 </weight>
    <location name="POINTMASS" unit="M">
      <x>  10.39 </x>
      <y>   0.00 </y>
      <z>   1.30 </z>
    </location>
  </pointmass>
-->
 </mass_balance>

 <ground_reactions>

  <contact type="BOGEY" name="NOSE">
   <location unit="M">
     <x>   2.420 </x>
     <y>   0.000 </y>
     <z>  -1.910 </z>
   </location>
   <static_friction>  0.80 </static_friction>
   <dynamic_friction> 0.50 </dynamic_friction>
   <rolling_friction> 0.02 </rolling_friction>
   <!-- <spring_coeff unit="LBS/FT">      14420.70 </spring_coeff>
   <damping_coeff unit="LBS/FT/SEC"> 24034.50 </damping_coeff> -->
            <spring_coeff unit="LBS/FT">60000 </spring_coeff>
            <damping_coeff unit="LBS/FT/SEC"> 5000 </damping_coeff>
            <damping_coeff_rebound unit="LBS/FT/SEC">10000</damping_coeff_rebound>
   <max_steer unit="DEG"> 45.00 </max_steer>
   <brake_group>NONE</brake_group>
   <retractable>1</retractable>
  </contact>

  <contact type="BOGEY" name="LEFT_MAIN">
   <location unit="M">
     <x>   10.270 </x>
     <y>   -3.950 </y>
     <z>   -1.910 </z>
   </location>
   <static_friction>  0.80 </static_friction>
   <dynamic_friction> 0.50 </dynamic_friction>
   <rolling_friction> 0.02 </rolling_friction>
   <!-- <spring_coeff unit="LBS/FT">      48069.00 </spring_coeff>
   <damping_coeff unit="LBS/FT/SEC"> 24034.50 </damping_coeff> -->
            <spring_coeff unit="LBS/FT"> 30000 </spring_coeff>
            <damping_coeff unit="LBS/FT/SEC"> 5000 </damping_coeff>
            <damping_coeff_rebound unit="LBS/FT/SEC">10000</damping_coeff_rebound>
   <max_steer unit="DEG">0</max_steer>
   <brake_group>LEFT</brake_group>
   <retractable>1</retractable>
  </contact>

  <contact type="BOGEY" name="RIGHT_MAIN">
   <location unit="M">
     <x>  10.270 </x>
     <y>   3.950 </y>
     <z>  -1.910 </z>
   </location>
   <static_friction>  0.80 </static_friction>
   <dynamic_friction> 0.50 </dynamic_friction>
   <rolling_friction> 0.02 </rolling_friction>
   <!-- <spring_coeff unit="LBS/FT">      48069.00 </spring_coeff>
   <damping_coeff unit="LBS/FT/SEC"> 24034.50 </damping_coeff> -->
            <spring_coeff unit="LBS/FT"> 30000 </spring_coeff>
            <damping_coeff unit="LBS/FT/SEC"> 5000 </damping_coeff>
            <damping_coeff_rebound unit="LBS/FT/SEC">10000</damping_coeff_rebound>
   <max_steer unit="DEG">0</max_steer>
   <brake_group>RIGHT</brake_group>
   <retractable>1</retractable>
  </contact>

  <contact type="STRUCTURE" name="LEFT_WING">
    <location unit="M">
     <x>  10.270 </x>
     <y> -14.100 </y>
     <z>   1.214 </z>
    </location>
    <static_friction>  1.00 </static_friction>
    <dynamic_friction> 1.00 </dynamic_friction>
    <spring_coeff unit="LBS/FT">      4869.00 </spring_coeff>
    <damping_coeff unit="LBS/FT/SEC"> 4809.00 </damping_coeff>
  </contact>

  <contact type="STRUCTURE" name="RIGHT_WING">
    <location unit="M">
     <x>  10.270 </x>
     <y>  14.100 </y>
     <z>   1.214 </z>
    </location>
    <static_friction>  1.00 </static_friction>
    <dynamic_friction> 1.00 </dynamic_friction>
    <spring_coeff unit="LBS/FT">      4069.00 </spring_coeff>
    <damping_coeff unit="LBS/FT/SEC"> 4869.00 </damping_coeff>
  </contact>

  <contact type="STRUCTURE" name="TAIL">
    <location unit="M">
     <x>  14.100 </x>
     <y>   0.0   </y>
     <z>  -1.050 </z>
    </location>
    <static_friction>  1.00 </static_friction>
    <dynamic_friction> 1.00 </dynamic_friction>
    <spring_coeff unit="LBS/FT">      4069.00 </spring_coeff>
    <damping_coeff unit="LBS/FT/SEC"> 4869.00 </damping_coeff>
  </contact>

 </ground_reactions>

 <propulsion>
<!--
   <engine file="ai24">
    <location unit="IN">
      <x> 444.12 </x>
      <y> -191.61 </y>
      <z> -40.00 </z>
    </location>
    <orient unit="DEG">
      <pitch> 0.00 </pitch>
      <roll>  0.00 </roll>
      <yaw>   0.00 </yaw>
    </orient>
    <feed>0</feed>
    <thruster file="an24_prop">
     <location unit="IN">
       <x> 444.12 </x>
       <y> -191.61 </y>
       <z> -40.00 </z>
     </location>
     <orient unit="DEG">
       <pitch> 0.00 </pitch>
       <roll>  0.00 </roll>
       <yaw>   0.00 </yaw>
     </orient>
    </thruster>
  </engine>

   <engine file="ai24">
    <location unit="IN">
      <x> 444.12 </x>
      <y> 191.61 </y>
      <z> -40.00 </z>
    </location>
    <orient unit="DEG">
      <pitch> 0.00 </pitch>
      <roll>  0.00 </roll>
      <yaw>   0.00 </yaw>
    </orient>
    <feed>1</feed>
    <thruster file="an24_prop">
     <location unit="IN">
       <x> 444.12 </x>
       <y> 191.61 </y>
       <z> -40.00 </z>
     </location>
     <orient unit="DEG">
       <pitch> 0.00 </pitch>
       <roll>  0.00 </roll>
       <yaw>   0.00 </yaw>
     </orient>
    </thruster>
  </engine>

  <tank type="FUEL" number="0">
     <location unit="IN">
       <x> 344.12 </x>
       <y>   0.00 </y>
       <z> -23.16 </z>
     </location>
     <capacity unit="LBS"> 4069.84 </capacity>
     <contents unit="LBS"> 2034.92 </contents>
  </tank>

  <tank type="FUEL" number="1">
     <location unit="IN">
       <x> 344.12 </x>
       <y>   0.00 </y>
       <z> -23.16 </z>
     </location>
     <capacity unit="LBS"> 4069.84 </capacity>
     <contents unit="LBS"> 2034.92 </contents>
  </tank>

  <tank type="FUEL" number="2">
     <location unit="IN">
       <x> 344.12 </x>
       <y>   0.00 </y>
       <z> -23.16 </z>
     </location>
     <capacity unit="LBS"> 4069.84 </capacity>
     <contents unit="LBS"> 2034.92 </contents>
  </tank>
-->
 </propulsion>

 <flight_control name="FCS: an24">

  <channel name="Pitch">

   <summer name="Pitch Trim Sum">
      <input>fcs/elevator-cmd-norm</input>
      <input>fcs/pitch-trim-cmd-norm</input>
      <clipto>
        <min> -1 </min>
        <max>  1 </max>
      </clipto>
   </summer>

   <aerosurface_scale name="Elevator Control">
      <input>fcs/pitch-trim-sum</input>
      <range>
        <min> -0.35 </min>
        <max>  0.35 </max>
      </range>
      <output>fcs/elevator-pos-rad</output>
   </aerosurface_scale>

   <aerosurface_scale name="elevator normalization">
      <input>fcs/elevator-pos-rad</input>
      <domain>
        <min> -0.35 </min>
        <max>  0.35 </max>
      </domain>
      <range>
        <min> -1 </min>
        <max>  1 </max>
      </range>
      <output>fcs/elevator-pos-norm</output>
   </aerosurface_scale>

  </channel>

  <channel name="Roll">

   <summer name="Roll Trim Sum">
      <input>fcs/aileron-cmd-norm</input>
      <input>fcs/roll-trim-cmd-norm</input>
      <clipto>
        <min> -1 </min>
        <max>  1 </max>
      </clipto>
   </summer>

   <aerosurface_scale name="Left Aileron Control">
      <input>fcs/roll-trim-sum</input>
      <range>
        <min> -0.35 </min>
        <max>  0.35 </max>
      </range>
      <output>fcs/left-aileron-pos-rad</output>
   </aerosurface_scale>

   <aerosurface_scale name="Right Aileron Control">
      <input>fcs/roll-trim-sum</input>
      <range>
        <min> -0.35 </min>
        <max>  0.35 </max>
      </range>
      <output>fcs/right-aileron-pos-rad</output>
   </aerosurface_scale>

   <aerosurface_scale name="left aileron normalization">
      <input>fcs/left-aileron-pos-rad</input>
      <domain>
        <min> -0.35 </min>
        <max>  0.35 </max>
      </domain>
      <range>
        <min> -1 </min>
        <max>  1 </max>
      </range>
      <output>fcs/left-aileron-pos-norm</output>
   </aerosurface_scale>

   <aerosurface_scale name="right aileron normalization">
      <input>fcs/right-aileron-pos-rad</input>
      <domain>
        <min> -0.35 </min>
        <max>  0.35 </max>
      </domain>
      <range>
        <min> -1 </min>
        <max>  1 </max>
      </range>
      <output>fcs/right-aileron-pos-norm</output>
   </aerosurface_scale>

  </channel>

  <channel name="Yaw">

   <summer name="Rudder Command Sum">
      <input>fcs/rudder-cmd-norm</input>
      <input>fcs/yaw-trim-cmd-norm</input>
      <clipto>
        <min> -1 </min>
        <max>  1 </max>
      </clipto>
   </summer>

   <aerosurface_scale name="Rudder Control">
      <input>fcs/rudder-command-sum</input>
      <range>
        <min> -0.35 </min>
        <max>  0.35 </max>
      </range>
      <output>fcs/rudder-pos-rad</output>
   </aerosurface_scale>

   <aerosurface_scale name="rudder normalization">
      <input>fcs/rudder-pos-rad</input>
      <domain>
        <min> -0.35 </min>
        <max>  0.35 </max>
      </domain>
      <range>
        <min> -1 </min>
        <max>  1 </max>
      </range>
      <output>fcs/rudder-pos-norm</output>
   </aerosurface_scale>

  </channel>

  <channel name="Flaps">
   <kinematic name="Flaps Control">
     <input>fcs/flap-cmd-norm</input>
     <traverse>
       <setting>
          <position>  0 </position>
          <time>      0 </time>
       </setting>
       <setting>
          <position> 15 </position>
          <time>      4 </time>
       </setting>
       <setting>
          <position> 30 </position>
          <time>      3 </time>
       </setting>
     </traverse>
     <output>fcs/flap-pos-deg</output>
   </kinematic>

   <aerosurface_scale name="flap normalization">
      <input>fcs/flap-pos-deg</input>
      <domain>
        <min>  0 </min>
        <max> 30 </max>
      </domain>
      <range>
        <min> 0 </min>
        <max> 1 </max>
      </range>
      <output>fcs/flap-pos-norm</output>
   </aerosurface_scale>

  </channel>

  <channel name="Landing Gear">
   <kinematic name="Gear Control">
     <input>gear/gear-cmd-norm</input>
     <traverse>
       <setting>
          <position> 0 </position>
          <time>     0 </time>
       </setting>
       <setting>
          <position> 1 </position>
          <time>     5 </time>
       </setting>
     </traverse>
     <output>gear/gear-pos-norm</output>
   </kinematic>

  </channel>

  <channel name="Speedbrake">
   <kinematic name="Speedbrake Control">
     <input>fcs/speedbrake-cmd-norm</input>
     <traverse>
       <setting>
          <position> 0 </position>
          <time>     0 </time>
       </setting>
       <setting>
          <position> 1 </position>
          <time>     1 </time>
       </setting>
     </traverse>
     <output>fcs/speedbrake-pos-norm</output>
   </kinematic>

  </channel>

 </flight_control>

 <aerodynamics>


        <function name="aero/function/cmf">
            <description>Mach and flaps parameter</description>
            <sum>
                <property>fcs/flap-pos-deg</property>
                <product>
                    <property>velocities/mach</property>
                    <value>-1</value>
                </product>
            </sum>
        </function>
        <function name="aero/function/cy">
            <description>Lift due to alpha</description>
            <table name="Cy">
                <independentVar lookup="row">aero/alpha-wing-rad</independentVar>
                <independentVar lookup="column">aero/function/cmf</independentVar>
                <tableData>
                               -0.95         -0.8          -0.5          0.2           28            45
                  -0.06981      -0.65         -0.65         -0.65         -0.65         0             0.25
                  0             -0.22         -0.2          -0.25         -0.25         0.4           0.65
                  0.04887       0.05          0.1           0.05          0             0.65          0.93
                  0.08727       0.24          0.36          0.3           0.2           0.87          1.15
                  0.1658        0.62          0.8           0.78          0.6           1.3           1.58
                  0.2618        0.78          1             1.19          1.05          1.78          2.08
                  0.2792        0.78          1.01          1.25          1.11          1.85          2.13
                  0.2967        0.75          0.95          1.28          1.18          1.9           2.08
                  0.3316        0.56          0.78          1.25          1.26          1.85          1.7
                  0.3665        0.3           0.5           1.18          1.3           1.7           1.4
                  0.384         0.18          0.35          1.1           1.27          1.6           1.3
                  0.4363        -0.2          -0.1          0.9           1.13          1.3           1
                </tableData>
            </table>
        </function>

  <axis name="LIFT">

    <function name="aero/force/Lift_alpha">
      <description>Lift due to alpha</description>
      <product>
          <property>aero/qbar-psf</property>
          <property>metrics/Sw-sqft</property>
          <table>
            <independentVar lookup="row">aero/alpha-rad</independentVar>
            <tableData>
              -0.20 -0.740
               0.00  0.240
               0.24  1.400
               0.60  0.704
            </tableData>
          </table>
      </product>
    </function>

    <function name="aero/force/Lift_flap">
       <description>Delta Lift due to flaps</description>
       <product>
           <property>aero/qbar-psf</property>
           <property>metrics/Sw-sqft</property>
           <property>fcs/flap-pos-deg</property>
           <value> 0.02000 </value>
       </product>
    </function>

    <function name="aero/force/Lift_speedbrake">
       <description>Delta Lift due to speedbrake</description>
       <product>
           <property>aero/qbar-psf</property>
           <property>metrics/Sw-sqft</property>
           <property>fcs/speedbrake-pos-norm</property>
           <value>0</value>
       </product>
    </function>

    <function name="aero/force/Lift_elevator">
       <description>Lift due to Elevator Deflection</description>
       <product>
           <property>aero/qbar-psf</property>
           <property>metrics/Sw-sqft</property>
           <property>fcs/elevator-pos-rad</property>
           <value>0.2</value>
       </product>
    </function>

  </axis>

  <axis name="DRAG">

    <function name="aero/force/Drag_basic">
       <description>Drag at zero lift</description>
       <product>
          <property>aero/qbar-psf</property>
          <property>metrics/Sw-sqft</property>
          <table>
            <independentVar lookup="row">aero/alpha-rad</independentVar>
            <tableData>
             -1.57    1.500
             -0.26    0.033
              0.00    0.025
              0.26    0.033
              1.57    1.500
            </tableData>
          </table>
       </product>
    </function>

    <function name="aero/force/Drag_induced">
       <description>Induced drag</description>
         <product>
           <property>aero/qbar-psf</property>
           <property>metrics/Sw-sqft</property>
           <property>aero/cl-squared</property>
           <value>0.039</value>
         </product>
    </function>

    <function name="aero/force/Drag_mach">
       <description>Drag due to mach</description>
        <product>
          <property>aero/qbar-psf</property>
          <property>metrics/Sw-sqft</property>
          <table>
            <independentVar lookup="row">velocities/mach</independentVar>
            <tableData>
                0.00      0.000
                0.7      0.000
                1.10      0.023
                1.80      0.015
            </tableData>
          </table>
        </product>
    </function>

    <function name="aero/force/Drag_flap">
       <description>Drag due to flaps</description>
         <product>
           <property>aero/qbar-psf</property>
           <property>metrics/Sw-sqft</property>
           <property>fcs/flap-pos-deg</property>
           <value> 0.00117 </value>
         </product>
    </function>

    <function name="aero/force/Drag_gear">
       <description>Drag due to gear</description>
         <product>
           <property>aero/qbar-psf</property>
           <property>metrics/Sw-sqft</property>
           <property>gear/gear-pos-norm</property>
           <value>0.014</value>
         </product>
    </function>

    <function name="aero/force/Drag_speedbrake">
       <description>Drag due to speedbrakes</description>
         <product>
           <property>aero/qbar-psf</property>
           <property>metrics/Sw-sqft</property>
           <property>fcs/speedbrake-pos-norm</property>
           <value>0.025</value>
         </product>
    </function>

    <function name="aero/force/Drag_beta">
       <description>Drag due to sideslip</description>
       <product>
          <property>aero/qbar-psf</property>
          <property>metrics/Sw-sqft</property>
          <table>
            <independentVar lookup="row">aero/beta-rad</independentVar>
            <tableData>
              -1.57    1.230
              -0.26    0.050
              -0.14    0.018
              -0.13    0.014
              -0.105   0.008
              -0.07    0.004
               0.00    0.000
               0.07    0.004
               0.105   0.008
               0.13    0.014
               0.14    0.018
               0.26    0.050
               1.57    1.230
            </tableData>
          </table>
       </product>
    </function>

    <function name="aero/force/Drag_elevator">
       <description>Drag due to Elevator Deflection</description>
       <product>
           <property>aero/qbar-psf</property>
           <property>metrics/Sw-sqft</property>
           <abs><property>fcs/elevator-pos-norm</property></abs>
           <value>0.04</value>
       </product>
    </function>

  </axis>

  <axis name="SIDE">

    <function name="aero/force/Side_beta">
       <description>Side force due to beta</description>
       <product>
           <property>aero/qbar-psf</property>
           <property>metrics/Sw-sqft</property>
           <property>aero/beta-rad</property>
           <value>-1</value>
       </product>
    </function>

  </axis>

  <axis name="ROLL">

    <function name="aero/moment/Roll_beta">
       <description>Roll moment due to beta</description>
       <product>
           <property>aero/qbar-psf</property>
           <property>metrics/Sw-sqft</property>
           <property>metrics/bw-ft</property>
           <property>aero/beta-rad</property>
           <value>-0.1</value>
       </product>
    </function>

    <function name="aero/moment/Roll_damp">
       <description>Roll moment due to roll rate</description>
       <product>
           <property>aero/qbar-psf</property>
           <property>metrics/Sw-sqft</property>
           <property>metrics/bw-ft</property>
           <property>aero/bi2vel</property>
           <property>velocities/p-aero-rad_sec</property>
           <value>-0.4</value>
       </product>
    </function>

    <function name="aero/moment/Roll_yaw">
       <description>Roll moment due to yaw rate</description>
       <product>
           <property>aero/qbar-psf</property>
           <property>metrics/Sw-sqft</property>
           <property>metrics/bw-ft</property>
           <property>aero/bi2vel</property>
           <property>velocities/r-aero-rad_sec</property>
           <value>0.15</value>
       </product>
    </function>

    <function name="aero/moment/Roll_aileron">
       <description>Roll moment due to aileron</description>
       <product>
          <property>aero/qbar-psf</property>
          <property>metrics/Sw-sqft</property>
          <property>metrics/bw-ft</property>
          <property>fcs/left-aileron-pos-rad</property>
          <value>0.15</value>
       </product>
    </function>

    <function name="aero/moment/Roll_rudder">
       <description>Roll moment due to rudder</description>
       <product>
           <property>aero/qbar-psf</property>
           <property>metrics/Sw-sqft</property>
           <property>metrics/bw-ft</property>
           <property>fcs/rudder-pos-rad</property>
           <value>0.01</value>
       </product>
    </function>

  </axis>

  <axis name="PITCH">

    <function name="aero/moment/Pitch_alpha">
       <description>Pitch moment due to alpha</description>
       <product>
           <property>aero/qbar-psf</property>
           <property>metrics/Sw-sqft</property>
           <property>metrics/cbarw-ft</property>
           <property>aero/alpha-rad</property>
           <value>-0.4</value>
       </product>
    </function>

    <function name="aero/moment/Pitch_elevator">
       <description>Pitch moment due to elevator</description>
       <product>
          <property>aero/qbar-psf</property>
          <property>metrics/Sw-sqft</property>
          <property>metrics/cbarw-ft</property>
          <property>fcs/elevator-pos-rad</property>
          <table>
            <independentVar lookup="row">velocities/mach</independentVar>
            <tableData>
              0.0     -1.000
              2.0     -0.250
            </tableData>
          </table>
       </product>
    </function>

    <function name="aero/moment/Pitch_damp">
       <description>Pitch moment due to pitch rate</description>
       <product>
           <property>aero/qbar-psf</property>
           <property>metrics/Sw-sqft</property>
           <property>metrics/cbarw-ft</property>
           <property>aero/ci2vel</property>
           <property>velocities/q-aero-rad_sec</property>
           <value>-22</value>
       </product>
    </function>

    <function name="aero/moment/Pitch_alphadot">
       <description>Pitch moment due to alpha rate</description>
       <product>
           <property>aero/qbar-psf</property>
           <property>metrics/Sw-sqft</property>
           <property>metrics/cbarw-ft</property>
           <property>aero/ci2vel</property>
           <property>aero/alphadot-rad_sec</property>
           <value>-8</value>
       </product>
    </function>

  </axis>

  <axis name="YAW">

    <function name="aero/moment/Yaw_beta">
       <description>Yaw moment due to beta</description>
       <product>
           <property>aero/qbar-psf</property>
           <property>metrics/Sw-sqft</property>
           <property>metrics/bw-ft</property>
           <property>aero/beta-rad</property>
           <value>0.12</value>
       </product>
    </function>

    <function name="aero/moment/Yaw_damp">
       <description>Yaw moment due to yaw rate</description>
       <product>
           <property>aero/qbar-psf</property>
           <property>metrics/Sw-sqft</property>
           <property>metrics/bw-ft</property>
           <property>aero/bi2vel</property>
           <property>velocities/r-aero-rad_sec</property>
           <value>-0.15</value>
       </product>
    </function>

    <function name="aero/moment/Yaw_rudder">
       <description>Yaw moment due to rudder</description>
       <product>
           <property>aero/qbar-psf</property>
           <property>metrics/Sw-sqft</property>
           <property>metrics/bw-ft</property>
           <property>fcs/rudder-pos-rad</property>
           <value>-0.1</value>
       </product>
    </function>

    <function name="aero/moment/Yaw_aileron">
       <description>Adverse yaw</description>
       <product>
           <property>aero/qbar-psf</property>
           <property>metrics/Sw-sqft</property>
           <property>metrics/bw-ft</property>
           <property>fcs/left-aileron-pos-rad</property>
           <value>-0.008</value>
       </product>
    </function>

  </axis>

 </aerodynamics>

 <external_reactions>
 </external_reactions>

</fdm_config>
